<?xml version="1.0"?>
<?xml-stylesheet type="text/xsl" href="http://jsbsim.sourceforge.net/JSBSim.xsl"?>
<fdm_config name="pa11" version="2.0" release="ALPHA"
   xmlns:xsi="http://www.w3.org/2001/XMLSchema-instance"
   xsi:noNamespaceSchemaLocation="http://jsbsim.sourceforge.net/JSBSim.xsd">

 <fileheader>
  <author> Aeromatic v 0.96 </author>
  <filecreationdate>2025-09-14</filecreationdate>
  <version>$Revision: 1.20 $</version>
  <description> Models a pa11. </description>
 </fileheader>

<!--
  File:     pa11.xml
  Inputs:
    name:          pa11
    type:          light single
    max weight:    1220.0 lb
    wing span:     35.16 ft
    length:        22.33 ft
    wing area:     177.4 sq-ft
    gear type:     taildragger
    castering:
    retractable?:  no
    # engines:     1
    engine type:   piston
    engine layout: forward fuselage
    yaw damper?    no

  Outputs:
    wing loading:  6.88 lb/sq-ft
    payload:       259.4 lbs
    CL-alpha:      5 per radian
    CL-0:          0.25
    CL-max:        1.4
    CD-0:          0.028
    K:             0.04

-->

 <metrics>
   <wingarea  unit="FT2">  177.40 </wingarea>
   <wingspan  unit="FT" >   35.20 </wingspan>
   <wing_incidence>          0.03 </wing_incidence>
   <chord     unit="FT" >    5.25 </chord>
   <htailarea unit="FT2">   28.38 </htailarea>
   <htailarm  unit="FT" >   11.61 </htailarm>
   <vtailarea unit="FT2">   17.74 </vtailarea>
   <vtailarm  unit="FT" >   11.16 </vtailarm>
   <location name="AERORP" unit="IN">
     <x> 18.90 </x>
     <y>  0.00 </y>
     <z>  0.0 </z>
   </location>
   <location name="EYEPOINT" unit="IN">
     <x>  34.83 </x>
     <y> -18.00 </y>
     <z>  45.00 </z>
   </location>
   <location name="VRP" unit="IN">
     <x>0</x>
     <y>0</y>
     <z>0</z>
   </location>
 </metrics>

 <mass_balance>
   <ixx unit="SLUG*FT2">       546 </ixx>
   <iyy unit="SLUG*FT2">       391 </iyy>
   <izz unit="SLUG*FT2">       883 </izz>
   <emptywt unit="LBS" >       750 </emptywt>
   <location name="CG" unit="IN">
     <x>  13.80 </x>
     <y>   0.00 </y>
     <z> -23.99 </z>
   </location>
        <pointmass name="Front seat">
            <weight unit="LBS"> 160 </weight>
            <location name="POINTMASS" unit="IN">
                <x>   6.31 </x>
                <y>   0.00 </y>
                <z> -38.89 </z>
            </location>
        </pointmass>
        <pointmass name="Back seat">
            <weight unit="LBS"> 165 </weight>
            <location name="POINTMASS" unit="IN">
                <x>  24.00 </x>
                <y>   0.00 </y>
                <z> -37.64 </z>
            </location>
        </pointmass>
		<pointmass name="Payload">
			<description> 19.8 LBS payload</description>
			<weight unit="LBS">0</weight>
			<location name="POINTMASS" unit="IN">
				<x> 32.62 </x>
				<y>   0.00 </y>
				<z>  -36.70 </z>
			</location>
		</pointmass>
 		<pointmass name="Payload">
			<description> 70.8 LBS payload right wing</description>
			<weight unit="LBS">70.8</weight>
			<location name="POINTMASS" unit="IN">
				<x>  82.42 </x>
				<y>  18.23 </y>
				<z>  -0.99 </z>
			</location>
		</pointmass>
 </mass_balance>

 <ground_reactions>

  <contact type="BOGEY" name="LEFT_MAIN">
   <location unit="IN">
     <x> 3.53 </x>
     <y> -37.97 </y>
     <z> -62.09 </z>
   </location>
   <static_friction>  0.80 </static_friction>
   <dynamic_friction> 0.50 </dynamic_friction>
   <rolling_friction> 0.02 </rolling_friction>
   <spring_coeff unit="LBS/FT">       1220.00 </spring_coeff>
   <damping_coeff unit="LBS/FT/SEC">   410.00 </damping_coeff>
   <max_steer unit="DEG">0</max_steer>
   <brake_group>LEFT</brake_group>
   <retractable>0</retractable>
  </contact>

  <contact type="BOGEY" name="RIGHT_MAIN">
   <location unit="IN">
     <x> 3.53 </x>
     <y>  37.97 </y>
     <z> -62.09 </z>
   </location>
   <static_friction>  0.80 </static_friction>
   <dynamic_friction> 0.50 </dynamic_friction>
   <rolling_friction> 0.02 </rolling_friction>
   <spring_coeff unit="LBS/FT">       1220.00 </spring_coeff>
   <damping_coeff unit="LBS/FT/SEC">   410.00 </damping_coeff>
   <max_steer unit="DEG">0</max_steer>
   <brake_group>RIGHT</brake_group>
   <retractable>0</retractable>
  </contact>

  <contact type="BOGEY" name="TAIL">
   <location unit="IN">
     <x> 205.28 </x>
     <y>   0.00 </y>
     <z> -15.08 </z>
   </location>
   <static_friction>  0.60 </static_friction>
   <dynamic_friction> 0.50 </dynamic_friction>
   <rolling_friction> 0.02 </rolling_friction>
   <spring_coeff unit="LBS/FT">        220.00 </spring_coeff>
   <damping_coeff unit="LBS/FT/SEC">   120.00 </damping_coeff>
   <steerability> STEERABLE </steerability>
   <max_steer unit="DEG">-30 </max_steer>
   <brake_group>NONE</brake_group>
   <retractable>0</retractable>
  </contact>

  <contact type="STRUCTURE" name="LEFT_WING">
    <location unit="IN">
     <x> 28.62 </x>
     <y> -17.58 </y>
     <z>  -6.70 </z>
    </location>
    <static_friction>  1.00 </static_friction>
    <dynamic_friction> 1.00 </dynamic_friction>
    <spring_coeff unit="LBS/FT">       1220.00 </spring_coeff>
    <damping_coeff unit="LBS/FT/SEC">  1220.00 </damping_coeff>
  </contact>

  <contact type="STRUCTURE" name="RIGHT_WING">
    <location unit="IN">
     <x> 28.62 </x>
     <y>  17.58 </y>
     <z>  -6.70 </z>
    </location>
    <static_friction>  1.00 </static_friction>
    <dynamic_friction> 1.00 </dynamic_friction>
    <spring_coeff unit="LBS/FT">       1220.00 </spring_coeff>
    <damping_coeff unit="LBS/FT/SEC">  1220.00 </damping_coeff>
  </contact>

 </ground_reactions>

 <propulsion>

   <engine file="Continental C90-8F">
    <feed>0</feed>
    <thruster file="prop">
     <sense> 1 </sense>
     <p_factor> 5 </p_factor>
     <location unit="IN">
       <x> -53.40 </x>
       <y>   0.00 </y>
       <z> -27.47 </z>
     </location>
     <orient unit="DEG">
       <pitch> 0.00 </pitch>
       <roll>  0.00 </roll>
       <yaw>   0.00 </yaw>
     </orient>
    </thruster>
  </engine>

    <tank type="FUEL" number="0">
      <location unit="IN">
        <x> -34.25 </x>
        <y>   0.0  </y>
        <z> -27.47 </z>
      </location>
      <capacity unit="LBS">  0.02 </capacity>
      <contents unit="LBS">  0.02 </contents>
      <type>AVGAS</type>
    </tank>

    <tank type="FUEL" number="1">
      <location unit="IN">
       <x>   8.42 </x>
       <y>  -18.23 </y>
       <z>  -0.99 </z>
      </location>
      <capacity unit="LBS"> 102.50 </capacity>
      <contents unit="LBS">  51.50 </contents>
      <type>AVGAS</type>
    </tank>

 </propulsion>

  <system file="fuel"/>

 <flight_control name="FCS: pa11">

        <channel name="Mixture">
            <!-- If the engine was primed enough times and throttle
                 is in starter position, then mixture is 1.
				 (Taked from J3Cub logic)
            -->
            <fcs_function name="fcs/mixture-primer-cmd">
                <function>
                    <table>
                        <independentVar lookup="row">/controls/engines/engine/primer</independentVar>
                        <independentVar lookup="column">/controls/engines/engine/throttle</independentVar>
                        <tableData>
                                 0.09    0.1    0.5    0.51
                            2    0       0      0      0
                            3    0       1      1      0
                            4    0       1      1      0
                            5    0       1      1      0
                            6    0       1      1      0
                            7    0       0      0      0
                        </tableData>
                    </table>
                </function>
            </fcs_function>

            <pure_gain name="fcs/mixture-primer">
                <input>fcs/mixture-cmd-norm</input>
                <gain>fcs/mixture-primer-cmd</gain>
            </pure_gain>

            <!-- Primer logic -->
            <switch name="Mixture Position">
                <default value="fcs/mixture-cmd-norm"/>
                <output>fcs/mixture-pos-norm</output>
                <!-- Use primer if used and engine is cold. If engine
                     is warm, then the mixture lever is used.
                -->
                <test logic="AND" value="fcs/mixture-primer">
                    /controls/engines/engine/use-primer eq 1
                    /engines/engine/oil-temperature-degf le 75
                </test>
            </switch>

        </channel>

  <channel name="Pitch">

   <summer name="Pitch Trim Sum">
      <input>fcs/elevator-cmd-norm</input>
      <input>fcs/pitch-trim-cmd-norm</input>
      <clipto>
        <min> -1 </min>
        <max>  1 </max>
      </clipto>
   </summer>

   <aerosurface_scale name="Elevator Control">
      <input>fcs/pitch-trim-sum</input>
      <range>
        <min> -0.29 </min>
        <max>  0.34 </max>
      </range>
      <output>fcs/elevator-pos-rad</output>
   </aerosurface_scale>

   <aerosurface_scale name="elevator normalization">
      <input>fcs/elevator-pos-rad</input>
      <domain>
        <min> -0.29 </min>
        <max>  0.34 </max>
      </domain>
      <range>
        <min> -1 </min>
        <max>  1 </max>
      </range>
      <output>fcs/elevator-pos-norm</output>
   </aerosurface_scale>

  </channel>

  <channel name="Roll">

   <summer name="Roll Trim Sum">
      <input>fcs/aileron-cmd-norm</input>
      <input>fcs/roll-trim-cmd-norm</input>
      <clipto>
        <min> -1 </min>
        <max>  1 </max>
      </clipto>
   </summer>

   <aerosurface_scale name="Left Aileron Control">
      <input>fcs/roll-trim-sum</input>
      <range>
        <min> -0.18 </min>
        <max>  0.18 </max>
      </range>
      <output>fcs/left-aileron-pos-rad</output>
   </aerosurface_scale>

   <aerosurface_scale name="Right Aileron Control">
      <input>fcs/roll-trim-sum</input>
      <range>
        <min> -0.18 </min>
        <max>  0.18 </max>
      </range>
      <output>fcs/right-aileron-pos-rad</output>
   </aerosurface_scale>

   <aerosurface_scale name="left aileron normalization">
      <input>fcs/left-aileron-pos-rad</input>
      <domain>
        <min> -0.18 </min>
        <max>  0.18 </max>
      </domain>
      <range>
        <min> -1 </min>
        <max>  1 </max>
      </range>
      <output>fcs/left-aileron-pos-norm</output>
   </aerosurface_scale>

   <aerosurface_scale name="right aileron normalization">
      <input>fcs/right-aileron-pos-rad</input>
      <domain>
        <min> -0.18 </min>
        <max>  0.18 </max>
      </domain>
      <range>
        <min> -1 </min>
        <max>  1 </max>
      </range>
      <output>fcs/right-aileron-pos-norm</output>
   </aerosurface_scale>

  </channel>

  <channel name="Yaw">

   <summer name="Rudder Command Sum">
      <input>fcs/rudder-cmd-norm</input>
      <input>fcs/yaw-trim-cmd-norm</input>
      <clipto>
        <min> -1 </min>
        <max>  1 </max>
      </clipto>
   </summer>

   <aerosurface_scale name="Rudder Control">
      <input>fcs/rudder-command-sum</input>
      <range>
        <min> -0.30 </min>
        <max>  0.30 </max>
      </range>
      <output>fcs/rudder-pos-rad</output>
   </aerosurface_scale>

   <aerosurface_scale name="rudder normalization">
      <input>fcs/rudder-pos-rad</input>
      <domain>
        <min> -0.30 </min>
        <max>  0.30 </max>
      </domain>
      <range>
        <min> -1 </min>
        <max>  1 </max>
      </range>
      <output>fcs/rudder-pos-norm</output>
   </aerosurface_scale>

  </channel>

  <channel name="Landing Gear">
  </channel>

  <channel name="Speedbrake">
  </channel>

 </flight_control>

 <aerodynamics>

    <function name="aero/function/velocity-induced-fps">
        <description> velocity including the propulsion induced velocity.</description>
        <sum>
            <property>velocities/u-aero-fps</property>
            <property>propulsion/engine/prop-induced-velocity_fps</property>
        </sum>
    </function>

    <function name="aero/function/qbar-induced-psf">
        <description> q bar including the propulsion induced velocity.</description>
        <product>
            <property>aero/function/velocity-induced-fps</property>
            <property>aero/function/velocity-induced-fps</property>
            <property>atmosphere/rho-slugs_ft3</property>
            <value>0.5</value>
        </product>
    </function>

  <axis name="LIFT">

    <function name="aero/force/Lift_alpha">
      <description>Lift due to alpha</description>
      <product>
          <property>aero/qbar-psf</property>
          <property>metrics/Sw-sqft</property>
          <table>
            <independentVar lookup="row">aero/alpha-rad</independentVar>
            <tableData>
              -0.20 -0.750
               0.00  0.250
               0.23  1.400
               0.60  0.710
            </tableData>
          </table>
      </product>
    </function>

    <function name="aero/force/Lift_flap">
       <description>Delta Lift due to flaps</description>
       <product>
           <property>aero/qbar-psf</property>
           <property>metrics/Sw-sqft</property>
           <property>fcs/flap-pos-deg</property>
           <value> 0.01333 </value>
       </product>
    </function>

    <function name="aero/force/Lift_speedbrake">
       <description>Delta Lift due to speedbrake</description>
       <product>
           <property>aero/qbar-psf</property>
           <property>metrics/Sw-sqft</property>
           <property>fcs/speedbrake-pos-norm</property>
           <value>0</value>
       </product>
    </function>

    <function name="aero/force/Lift_elevator">
       <description>Lift due to Elevator Deflection</description>
       <product>
           <property>aero/qbar-psf</property>
           <property>metrics/Sw-sqft</property>
           <property>fcs/elevator-pos-rad</property>
           <value>0.2</value>
       </product>
    </function>

  </axis>

  <axis name="DRAG">

    <function name="aero/force/Drag_basic">
       <description>Drag at zero lift</description>
       <product>
          <property>aero/qbar-psf</property>
          <property>metrics/Sw-sqft</property>
          <table>
            <independentVar lookup="row">aero/alpha-rad</independentVar>
            <tableData>
             -1.57    1.500
             -0.26    0.036
              0.00    0.028
              0.26    0.036
              1.57    1.500
            </tableData>
          </table>
       </product>
    </function>

    <function name="aero/force/Drag_induced">
       <description>Induced drag</description>
         <product>
           <property>aero/qbar-psf</property>
           <property>metrics/Sw-sqft</property>
           <property>aero/cl-squared</property>
           <value>0.04</value>
         </product>
    </function>

    <function name="aero/force/Drag_mach">
       <description>Drag due to mach</description>
        <product>
          <property>aero/qbar-psf</property>
          <property>metrics/Sw-sqft</property>
          <table>
            <independentVar lookup="row">velocities/mach</independentVar>
            <tableData>
                0.00      0.000
                0.7      0.000
                1.10      0.023
                1.80      0.015
            </tableData>
          </table>
        </product>
    </function>

    <function name="aero/force/Drag_flap">
       <description>Drag due to flaps</description>
         <product>
           <property>aero/qbar-psf</property>
           <property>metrics/Sw-sqft</property>
           <property>fcs/flap-pos-deg</property>
           <value> 0.00100 </value>
         </product>
    </function>

    <function name="aero/force/Drag_speedbrake">
       <description>Drag due to speedbrakes</description>
         <product>
           <property>aero/qbar-psf</property>
           <property>metrics/Sw-sqft</property>
           <property>fcs/speedbrake-pos-norm</property>
           <value>0.028</value>
         </product>
    </function>

    <function name="aero/force/Drag_beta">
       <description>Drag due to sideslip</description>
       <product>
          <property>aero/qbar-psf</property>
          <property>metrics/Sw-sqft</property>
          <table>
            <independentVar lookup="row">aero/beta-rad</independentVar>
            <tableData>
              -1.57    1.230
              -0.26    0.050
               0.00    0.000
               0.26    0.050
               1.57    1.230
            </tableData>
          </table>
       </product>
    </function>

    <function name="aero/force/Drag_elevator">
       <description>Drag due to Elevator Deflection</description>
       <product>
           <property>aero/qbar-psf</property>
           <property>metrics/Sw-sqft</property>
           <abs><property>fcs/elevator-pos-norm</property></abs>
           <value>0.04</value>
       </product>
    </function>

  </axis>

  <axis name="SIDE">

    <function name="aero/force/Side_beta">
       <description>Side force due to beta</description>
       <product>
           <property>aero/qbar-psf</property>
           <property>metrics/Sw-sqft</property>
           <property>aero/beta-rad</property>
           <value>-1</value>
       </product>
    </function>

  </axis>

  <axis name="ROLL">

    <function name="aero/moment/Roll_differential_propwash">
       <description>Roll moment due to differential propwash</description>
       <product>
           <property>/engines/engine[0]/thrust-coefficient</property>
           <property>aero/function/qbar-induced-psf</property>
           <property>metrics/Sw-sqft</property>
           <property>metrics/bw-ft</property>
           <property>aero/alpha-rad</property>
           <value> 0.1280 </value>
       </product>
    </function>

    <function name="aero/moment/Roll_beta">
       <description>Roll moment due to beta</description>
       <product>
           <property>aero/qbar-psf</property>
           <property>metrics/Sw-sqft</property>
           <property>metrics/bw-ft</property>
           <property>aero/beta-rad</property>
           <value>-0.1</value>
       </product>
    </function>

    <function name="aero/moment/Roll_damp">
       <description>Roll moment due to roll rate</description>
       <product>
           <property>aero/qbar-psf</property>
           <property>metrics/Sw-sqft</property>
           <property>metrics/bw-ft</property>
           <property>aero/bi2vel</property>
           <property>velocities/p-aero-rad_sec</property>
           <value>-0.52</value>
       </product>
    </function>

    <function name="aero/moment/Roll_yaw">
       <description>Roll moment due to yaw rate</description>
       <product>
           <property>aero/qbar-psf</property>
           <property>metrics/Sw-sqft</property>
           <property>metrics/bw-ft</property>
           <property>aero/bi2vel</property>
           <property>velocities/r-aero-rad_sec</property>
           <value>0.15</value>
       </product>
    </function>

    <function name="aero/moment/Roll_aileron">
       <description>Roll moment due to aileron</description>
       <product>
          <property>aero/qbar-psf</property>
          <property>metrics/Sw-sqft</property>
          <property>metrics/bw-ft</property>
          <property>fcs/left-aileron-pos-rad</property>
          <value>0.30</value>
       </product>
    </function>

    <function name="aero/moment/Roll_rudder">
       <description>Roll moment due to rudder</description>
       <product>
           <property>aero/qbar-psf</property>
           <property>metrics/Sw-sqft</property>
           <property>metrics/bw-ft</property>
           <property>fcs/rudder-pos-rad</property>
           <value>0.014</value>
       </product>
    </function>

  </axis>

  <axis name="PITCH">

    <function name="aero/moment/Pitch_alpha">
       <description>Pitch moment due to alpha</description>
       <product>
           <property>aero/qbar-psf</property>
           <property>metrics/Sw-sqft</property>
           <property>metrics/cbarw-ft</property>
           <property>aero/alpha-rad</property>
           <value>-0.5</value>
       </product>
    </function>

    <function name="aero/moment/Pitch_elevator">
       <description>Pitch moment due to elevator</description>
       <product>
          <property>aero/qbar-psf</property>
          <property>metrics/Sw-sqft</property>
          <property>metrics/cbarw-ft</property>
          <property>fcs/elevator-pos-rad</property>
          <table>
            <independentVar lookup="row">velocities/mach</independentVar>
            <tableData>
              0.0     -1.100
              2.0     -0.275
            </tableData>
          </table>
       </product>
    </function>

    <function name="aero/moment/Pitch_damp">
       <description>Pitch moment due to pitch rate</description>
       <product>
           <property>aero/qbar-psf</property>
           <property>metrics/Sw-sqft</property>
           <property>metrics/cbarw-ft</property>
           <property>aero/ci2vel</property>
           <property>velocities/q-aero-rad_sec</property>
           <value>-12</value>
       </product>
    </function>

    <function name="aero/moment/Pitch_alphadot">
       <description>Pitch moment due to alpha rate</description>
       <product>
           <property>aero/qbar-psf</property>
           <property>metrics/Sw-sqft</property>
           <property>metrics/cbarw-ft</property>
           <property>aero/ci2vel</property>
           <property>aero/alphadot-rad_sec</property>
           <value>-7</value>
       </product>
    </function>

  </axis>

  <axis name="YAW">

    <function name="aero/moment/Yaw_beta">
       <description>Yaw moment due to beta</description>
       <product>
           <property>aero/qbar-psf</property>
           <property>metrics/Sw-sqft</property>
           <property>metrics/bw-ft</property>
           <property>aero/beta-rad</property>
           <value>0.12</value>
       </product>
    </function>

    <function name="aero/moment/Yaw_damp">
       <description>Yaw moment due to yaw rate</description>
       <product>
           <property>aero/qbar-psf</property>
           <property>metrics/Sw-sqft</property>
           <property>metrics/bw-ft</property>
           <property>aero/bi2vel</property>
           <property>velocities/r-aero-rad_sec</property>
           <value>-0.15</value>
       </product>
    </function>

    <function name="aero/moment/Yaw_rudder">
       <description>Yaw moment due to rudder</description>
       <product>
           <property>aero/qbar-psf</property>
           <property>metrics/Sw-sqft</property>
           <property>metrics/bw-ft</property>
           <property>fcs/rudder-pos-rad</property>
           <value>-0.1</value>
       </product>
    </function>

    <function name="aero/moment/Yaw_aileron">
       <description>Adverse yaw</description>
       <product>
           <property>aero/qbar-psf</property>
           <property>metrics/Sw-sqft</property>
           <property>metrics/bw-ft</property>
           <property>fcs/left-aileron-pos-rad</property>
           <value>-0.01</value>
       </product>
    </function>

  </axis>

 </aerodynamics>

 <external_reactions>
 </external_reactions>

	<system file="pa11-engine"/>

</fdm_config>
